# Shaft calculation sheet  1/1
# Functions:
# Formler
yield_stress := 200  # disabled
yield_stress = 210
# τ_till = 0,6 x σ_till
# τ_nom = M_v / W_v
# W_v = π*d^3 / 16
# Input:
# Indata
# Yield point:
# Sträckgräns
σ_till := yield_stress  # [N/mm^2]
# Torque:
# Vridmoment
M := 1*10^4  # disabled  # [Nmm]
M = 5000
# Axis calculations:
# Axelberäkning
# Results:
# Resultat
# Shearing strength:
# Skjuvbrottgräns
τ_till := 0.6*σ_till
τ_till = 126  # [N/mm^2]
d := ceil(nthroot(M*16/(π*τ_till), 3))  # [mm]
d = 6
diameter := d
diameter = 6
# - - - - - - - - - - - - - - - - - - - - - - - - - - - - - - - - - - - - - - - - - - - - - - - - - - - - - - - - - - - - - - - - - - - - - - - - - - - - - -
