# Involute calculation sheet 1/2
# Input:
# Indata
# Module:
# Modul
module := 4  # disabled
# [mm]
module = 4
# Desired radius:
# Önskad radie
RD := 45  # disabled
# [mm]
RD = 14.2857
# Standards:
# Standard
# Angle of engagement:
# Ingreppsvinkel
Alpha := 20*deg  # disabled
# [deg]
Alpha = 0.349066
# Basic calculations:
# Grundberäkningar
# Results:
# Resultat
# Numner of teeth:
# Antal kugg
z := round(2*RD/module)
z = 7
# Base circle radius:
# Grundcirkelradie
R_b := module*z/2*cos(Alpha)
R_b = 13.1557  # [mm]
# Foot circle radius:
# Fotcirkelradie
R_f := module*z/2 - 1.25*module
R_f = 9  # [mm]
# Pitch circle radius:
# Delningscirkelradie
R_0 := module*z/2
R_0 = 14  # [mm]
# Top circle radius:
# Toppcirkelradie
R_a := module*z/2 + module
R_a = 18  # [mm]
# Envelope calculations:
# Envolventberäkningar
# Results:
# Resultat
# Intersection of envelope
# and top circle:
# Skärning mellan envolvent
# och toppcirkel
ϕ_a := sqrt((R_a/R_b)^2 - 1)
ϕ_a = 0.933836
# Envelope function:
# Envolventfunktion
ϕ := 0, 0.01 .. ϕ_a
x(ϕ) := R_b*(cos(ϕ*π) + ϕ*sin(ϕ*π)*π)
y(ϕ) := R_b*(sin(ϕ*π) - cos(ϕ*π)*ϕ*π)
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# Involute calculation sheet 2/2
# Teeth spacing angle:
# Kuggluckans öppningsvinkel
# Results:
# Resultat
# Intersection of envelope
# and pitch circle:
# Skärning mellan envolvent
# och delningscirkel
ϕ_0 := sqrt(1/cos(Alpha)^2 - 1)/π
ϕ_0 = 0.115855  # [rad]
γ_b := atan(y(ϕ_0)/x(ϕ_0)) + π/(2*z)
γ_b = 13.7111 deg  # [deg]
# Teeth spacing angle
# at the base circle:
# Kuggluckans öppnings-
# vinkel vid grundcirkeln
Φ_b := 360/(2*z) - 2*γ_b
Φ_b = 25.2357  # [deg]
# - - - - - - - - - - - - - - - - - - - - - - - - - - - - - - - - - - - - - - - - - - - - - - - - - - - - - - - - - - - - - - - - - - - - - - - - - - - - - -
# Envelope - Pro/Engineer input variables:
# Evolvent - Invariabler till Pro/Engineer
# Mathcad | Pro/Engineer
rot_dtm := 45 + Φ_b/2
rot_dtm = 57.6178
z_t := z
z_t = 7
ptr_incr := 360/z
ptr_incr = 51.4286
r_base := R_b
r_base = 13.1557
r_foot := R_f
r_foot = 9
r_pitch := R_0
r_pitch = 14
r_top := R_a
r_top = 18
phi_a := ϕ_a
phi_a = 0.933836
capphi_b := Φ_b
capphi_b = 25.2357
phi := γ_b
phi = 0.239304
# - - - - - - - - - - - - - - - - - - - - - - - - - - - - - - - - - - - - - - - - - - - - - - - - - - - - - - - - - - - - - - - - - - - - - - - - - - - - - -
